# Задание 2
Xa := 3
Xb := 15
Xc := 16
Xm := 4
Xn := 6
Xp := 14
Ya := 16
Yb := 9
Yc := 17
Ym := 4
Yn := 0
Yp := 0
Za := 10
Zb := 16
Zc := 9
Zm := 8
Zn := 18
Zp := 4
A(x, y) := [Xa; Ya; Za]
B(x, y) := [Xb; Yb; Zb]
C(x, y) := [Xc; Yc; Zc]
M(x, y) := [Xm; Ym; Zm]
N(x, y) := [Xn; Yn; Zn]
P(x, y) := [Xp; Yp; Zp]
LineAC(u, v) := [Xa + (Xc - Xa)*u; Ya + (Yc - Ya)*u; Za + (Zc - Za)*u]
LineAB(u, v) := [Xa + (Xb - Xa)*u; Ya + (Yb - Ya)*u; Za + (Zb - Za)*u]
LineBC(u, v) := [Xb + (Xc - Xb)*u; Yb + (Yc - Yb)*u; Zb + (Zc - Zb)*u]
LineMN(u, v) := [Xm + (Xn - Xm)*u; Ym + (Yn - Ym)*u; Zm + (Zn - Zm)*u]
Lab := CreateMesh(LineAB, 0, 1, 0, 0)
Lbc := CreateMesh(LineBC, 0, 1, 0, 0)
Lac := CreateMesh(LineAC, 0, 1, 0, 0)
Lmn := CreateMesh(LineMN, 0, 1, 0, 0)
# [component: inputs Lab, Lac, Lbc, Lmn, P, A, B, C, M, N]
# Задание 3
det([x - Xa, y - Ya, z - Za; Xb - Xa, Yb - Ya, Zb - Za; Xc - Xa, Yc - Ya, Zc - Za]) → x + 90*y + 103*z - 2473
x + 90*y + 103*z - 2473 == 0 solve, z → 2473/103 - 90*y/103 - x/103
z(x, y) := 2473/103 - 90*y/103 - x/103
Plane3(x, y) := [x; y; z(x, y)]
P3 := CreateMesh(Plane3, 20, 1, 20, 7, 7, 10)
# [component: inputs Lab, Lac, Lbc, Lmn, P, A, B, C, M, N, P3]
# Задание 4
(x - Xm)/(Xn - Xm) == (y - Ym)/(Yn - Ym) == (z - Zm)/(Zn - Zm) == t
Given
x == Xm + (Xn - Xm)*t
y == Ym + (Yn - Ym)*t
z == Zm + (Zn - Zm)*t
x + 90*y + 103*z - 2473 == 0
Find(x, y, z, t) → [2629/336; -613/168; 9113/336; 1285/672]
Peres(x, y) := [2629/336; -613/168; 9113/336]
Lmn := CreateMesh(LineMN, 0, 2.5, 0, 0)
P3 := CreateMesh(Plane3, 20, 1, 20, -10, 7, 15)
# [component: inputs Lab, Lac, Lbc, Lmn, P, A, B, C, P3, Peres]
# Задание 5
A5 := [Xa; Ya; Za]
B5 := [Xb; Yb; Zb]
C5 := [Xc; Yc; Zc]
P5 := [Xp; Yp; Zp]
nAB := (B5 - A5)/|B5 - A5| = [0.792982; -0.462573; 0.396491]
Paralell(t, v) := P5 + nAB*t
paralell := CreateMesh(Paralell, -20, 10, 0, 0)
Lmn := CreateMesh(LineMN, 0, 1, 0, 0)
P3 := CreateMesh(Plane3, 20, 1, 20, 7, 7, 10)
# [component: inputs Lab, Lac, Lbc, Lmn, P, A, B, C, M, N, P3, paralell]
# Задание 6
nABC := [1; 91; 104]
Perpend(t, v) := P5 + nABC*t
perpend := CreateMesh(Perpend, -0.02, 0.11, 0, 0)
Given
x == P5[0] + nABC[0]*t
y == P5[1] + nABC[1]*t
z == P5[2] + nABC[2]*t
x + 90*y + 103*z - 2473 == 0
Find(x, y, z, t) → [266689/18903; 186277/18903; 288500/18903; 2047/18903]
R(x, y) := [266689/18903; 186277/18903; 288500/18903]
R6 := [266689/18903; 186277/18903; 288500/18903]
Given
(P5[0] + x)/2 == R6[0]
(P5[1] + y)/2 == R6[1]
(P5[2] + z)/2 == R6[2]
P6' := Find(x, y, z) → [268736/18903; 372554/18903; 501388/18903]
P'(x, y) := [268736/18903; 372554/18903; 501388/18903]
# [component: inputs Lab, Lac, Lbc, Lmn, P, A, B, C, M, N, P3, perpend, R, P']
# Задание 7
x + 90*y + 103*z - 2473
p1 := 1
p2 := 90
p3 := 103
p4 := 2473
p1*(xx - Xp) + p2*(yy - Yp) + p3*(zz - Zp) == 0 solve, zz → 426/103 - 90*yy/103 - xx/103
Plane72(xx, yy) := [xx; yy; 426/103 - 90*yy/103 - xx/103]
P72 := CreateMesh(Plane72, 20, 1, 20, -5., 7, 20)
# [component: inputs Lab, Lac, Lbc, Lmn, P, A, B, C, M, N, P3, P72]
# Задание 8
R6 = [14.1083; 9.85436; 15.2621]
P5 = [14; 0; 4]
A5 = [3; 16; 10]
det([
    X - R6[0], Y - R6[1], Z - R6[2];
    P5[0] - R6[0], P5[1] - R6[1], P5[2] - R6[2];
    A5[0] - R6[0], A5[1] - R6[1], A5[2] - R6[2]
]) → 2288546*X/18903 + 2354050*Y/18903 - 693933*Z/6301 - 23712448/18903
2288546*X/18903 + 2354050*Y/18903 - 693933*Z/6301 - 23712448/18903 == 0 solve, Z → 1118*X/1017 + 1150*Y/1017 - 11584/1017
z(X, Y) := 1118*X/1017 + 1150*Y/1017 - 11584/1017
Plane3(x, y) := [x; y; z(x, y)]
P8 := CreateMesh(Plane3, 20, 1, 20, 7, 7, 10)
# [component: inputs Lab, Lac, Lbc, Lmn, P, A, B, C, M, N, P8, P72]
